# OpenSim document version 30000
Model Model_Left_Side:
  length_units: meters
  force_units: N
  gravity: 0 -9.80665 0
  credits:
    Frank Anderson, Peter Loan, Ayman Habib, Ajay Seth, Michael Sherman
  BodySet:
    Body ground: mass=0 mass_center=(0 0 0) inertia_xx=1 inertia_yy=1 inertia_zz=1
    Body calcn_l: mass=1.46671 mass_center=(0.1 0.03 0) inertia_xx=0.001642715 inertia_yy=0.004576136
        inertia_zz=0.004810809 meshes=l_foot.vtp
      CustomJoint calcn_l_toGround: parent_body=ground location_in_parent=(0 0 0) location=(0 0 0)
        Coordinate first_body_list: motion_type=rotational default_value=0 range=(-1.570796 1.570796) clamped=false
        Coordinate first_body_rotation: motion_type=rotational default_value=0 range=(-1.570796 1.570796) clamped=false
        Coordinate first_body_tilt: motion_type=rotational default_value=0 range=(-1.570796 1.570796) clamped=false
        Coordinate first_body_tx: motion_type=translational default_value=0 range=(-5 5) clamped=false
        Coordinate first_body_ty: motion_type=translational default_value=0 range=(-1 2) clamped=false
        Coordinate first_body_tz: motion_type=translational default_value=0 range=(-3 3) clamped=false
        SpatialTransform:
          TransformAxis rotation1: coordinates=first_body_list axis=(1 0 0) LinearFunction(coefficients=1 0)
          TransformAxis rotation2: coordinates=first_body_rotation axis=(0 1 0) LinearFunction(coefficients=1 0)
          TransformAxis rotation3: coordinates=first_body_tilt axis=(0 0 1) LinearFunction(coefficients=1 0)
          TransformAxis translation1: coordinates=first_body_tx axis=(1 0 0) LinearFunction(coefficients=1 0)
          TransformAxis translation2: coordinates=first_body_ty axis=(0 1 0) LinearFunction(coefficients=1 0)
          TransformAxis translation3: coordinates=first_body_tz axis=(0 0 1) LinearFunction(coefficients=1 0)
    Body talus_l: mass=0.1173368 mass_center=(0 0 0) inertia_xx=0.001173368 inertia_yy=0.001173368
        inertia_zz=0.001173368 meshes=l_talus.vtp
      CustomJoint subtalar_l: parent_body=calcn_l location_in_parent=(0 0 0) location=(-0.04877 -0.04195 -0.00792)
          reverse=true
        Coordinate subtalar_angle_l: motion_type=rotational default_value=0 range=(-1.570796 1.570796) clamped=true
            locked=true
        SpatialTransform: axes_held_at_zero=(rotation2 rotation3 translation1 translation2 translation3)
          TransformAxis rotation1: coordinates=subtalar_angle_l axis=(-0.7871796 -0.6047475 -0.1209495)
              LinearFunction(coefficients=1 0)
    Body tibia_l: mass=4.350262 mass_center=(0 -0.192227 0) inertia_xx=0.06269097 inertia_yy=0.006343729
        inertia_zz=0.06356168 meshes=(l_tibia.vtp l_fibula.vtp)
      CustomJoint ankle_l: parent_body=talus_l location_in_parent=(0 0 0) location=(0 -0.4427296 0) reverse=true
        Coordinate ankle_angle_l: motion_type=rotational default_value=0 range=(-1.047198 1.047198) clamped=true
        SpatialTransform: axes_held_at_zero=(rotation2 rotation3 translation1 translation2 translation3)
          TransformAxis rotation1: coordinates=ankle_angle_l axis=(0.1050135 0.1740224 0.9791263)
              LinearFunction(coefficients=1 0)
    Body femur_l: mass=10.91397 mass_center=(0 -0.171294 0) inertia_xx=0.1595145 inertia_yy=0.04181449
        inertia_zz=0.168211 meshes=l_femur.vtp
      CustomJoint knee_l: parent_body=tibia_l location_in_parent=(0 0 0) location=(0 0 0) reverse=true
        Coordinate knee_angle_l: motion_type=rotational default_value=0 range=(-2.094395 0.1745329) clamped=true
        SpatialTransform: axes_held_at_zero=(rotation2 rotation3 translation3)
          TransformAxis rotation1: coordinates=knee_angle_l axis=(0 0 1) LinearFunction(coefficients=1 0)
          TransformAxis translation1: coordinates=knee_angle_l axis=(1 0 0)
            MultiplierFunction: scale=1.007611
              SimmSpline: x=(-2.0944 -1.74533 -1.39626 -1.0472 -0.698132 -0.349066 -0.174533 0.197344 0.337395 0.490178 1.52146 2.0944)
                  y=(-0.0032 0.00179 0.00411 0.0041 0.00212 -0.001 -0.0031 -0.005227 -0.005435 -0.005574 -0.005435 -0.00525)
          TransformAxis translation2: coordinates=knee_angle_l axis=(0 1 0)
            MultiplierFunction: scale=1.007611
              SimmSpline: x=(-2.0944 -1.22173 -0.523599 -0.349066 -0.174533 0.159149 2.0944)
                  y=(-0.4226 -0.4082 -0.399 -0.3976 -0.3966 -0.395264 -0.396)
    Body pelvis: mass=6.909378 mass_center=(-0.0652792 0 0) inertia_xx=0.05141722 inertia_yy=0.04356459
        inertia_zz=0.0289597 meshes=(sacrum.vtp pelvis.vtp l_pelvis.vtp)
      CustomJoint hip_l: parent_body=femur_l location_in_parent=(0 0 0) location=(-0.06527923 -0.06103192 -0.07709781)
          reverse=true
        Coordinate hip_flexion_l: motion_type=rotational default_value=0 range=(-2.094395 2.094395) clamped=true
        Coordinate hip_adduction_l: motion_type=rotational default_value=0 range=(-2.094395 2.094395) clamped=true
        Coordinate hip_rotation_l: motion_type=rotational default_value=0 range=(-2.094395 2.094395) clamped=true
        SpatialTransform: axes_held_at_zero=(translation1 translation2 translation3)
          TransformAxis rotation1: coordinates=hip_flexion_l axis=(0 0 1) LinearFunction(coefficients=1 0)
          TransformAxis rotation2: coordinates=hip_adduction_l axis=(-1 0 0) LinearFunction(coefficients=1 0)
          TransformAxis rotation3: coordinates=hip_rotation_l axis=(0 -1 0) LinearFunction(coefficients=1 0)
    Body torso: mass=40.17213 mass_center=(-0.0334543 0.356846 0) inertia_xx=2.151496 inertia_yy=1.102377
        inertia_zz=2.088607 meshes=(hat_spine.vtp hat_jaw.vtp hat_skull.vtp hat_ribs.vtp)
      CustomJoint back: parent_body=pelvis location_in_parent=(-0.09297904 0.07525116 0) location=(0 0 0)
        Coordinate lumbar_extension: motion_type=rotational default_value=0 range=(-1.570796 1.570796) clamped=true
        Coordinate lumbar_bending: motion_type=rotational default_value=0 range=(-1.570796 1.570796) clamped=true
        Coordinate lumbar_rotation: motion_type=rotational default_value=0 range=(-1.570796 1.570796) clamped=true
        SpatialTransform: axes_held_at_zero=(translation1 translation2 translation3)
          TransformAxis rotation1: coordinates=lumbar_extension axis=(0 0 1) LinearFunction(coefficients=1 0)
          TransformAxis rotation2: coordinates=lumbar_bending axis=(1 0 0) LinearFunction(coefficients=1 0)
          TransformAxis rotation3: coordinates=lumbar_rotation axis=(0 1 0) LinearFunction(coefficients=1 0)
    Body toes_l: mass=0.2541515 mass_center=(0.0346 0.006 0.0175) inertia_xx=0.0001173368 inertia_yy=0.0002346736
        inertia_zz=0.001173368 meshes=l_bofoot.vtp
      CustomJoint mtp_l: parent_body=calcn_l location_in_parent=(0.1788 -0.002 -0.00108) location=(0 0 0)
        Coordinate mtp_angle_l: motion_type=rotational default_value=0 range=(-1.047198 1.047198) clamped=true
            locked=true
        SpatialTransform: axes_held_at_zero=(rotation2 rotation3 translation1 translation2 translation3)
          TransformAxis rotation1: coordinates=mtp_angle_l axis=(0.5809544 0 0.8139361)
              LinearFunction(coefficients=1 0)
  ForceSet:
    Thelen2003Muscle [values shared by the 49 below unless stated]: min_control=0 max_control=1 optimal_force=1
        max_contraction_velocity=10 activation_time_constant=0.01 deactivation_time_constant=0.04
        FmaxTendonStrain=0.033 FmaxMuscleStrain=0.6 KshapeActive=0.5 KshapePassive=4 Af=0.3 Flen=1.8
    Thelen2003Muscle glut_med1_l: max_isometric_force=819 optimal_fiber_length=0.05047946
        tendon_slack_length=0.07359623 pennation_angle_at_optimal=0.1396263 [radians]
      PathPoint P1: pelvis (-0.0376717 0.0280691 -0.11163)
      PathPoint P2: femur_l (-0.0219659 -0.011789 -0.0559224)
    Thelen2003Muscle glut_med2_l: max_isometric_force=573 optimal_fiber_length=0.07976275
        tendon_slack_length=0.05002871 pennation_angle_at_optimal=0
      PathPoint P1: pelvis (-0.0789445 0.0410881 -0.0707269)
      PathPoint P2: femur_l (-0.0259964 -0.00584414 -0.0531011)
    Thelen2003Muscle glut_med3_l: max_isometric_force=653 optimal_fiber_length=0.06124043
        tendon_slack_length=0.05024369 pennation_angle_at_optimal=0.3316126
      PathPoint P1: pelvis (-0.112923 0.00969493 -0.0598316)
      PathPoint P2: femur_l (-0.0311352 -0.00473577 -0.0521942)
    Thelen2003Muscle glut_min1_l: max_isometric_force=270 optimal_fiber_length=0.06524904
        tendon_slack_length=0.01535271 pennation_angle_at_optimal=0.1745329
      PathPoint P1: pelvis (-0.0431194 -0.00738662 -0.0975033)
      PathPoint P2: femur_l (-0.0072548 -0.0104791 -0.0564262)
    Thelen2003Muscle glut_min2_l: max_isometric_force=285 optimal_fiber_length=0.05394533
        tendon_slack_length=0.02504604 pennation_angle_at_optimal=0
      PathPoint P1: pelvis (-0.0584466 -0.00600163 -0.0915017)
      PathPoint P2: femur_l (-0.00967306 -0.0104791 -0.0564262)
    Thelen2003Muscle glut_min3_l: max_isometric_force=323 optimal_fiber_length=0.0366185 tendon_slack_length=0.04914588
        pennation_angle_at_optimal=0.01745329
      PathPoint P1: pelvis (-0.0770055 -0.00581696 -0.0790368)
      PathPoint P2: femur_l (-0.0136027 -0.00836317 -0.0554186)
    Thelen2003Muscle semimem_l: max_isometric_force=1288 optimal_fiber_length=0.08132022 tendon_slack_length=0.3649245
        pennation_angle_at_optimal=0.2617994
      PathPoint P1: pelvis (-0.110061 -0.0899967 -0.0660271)
      ConditionalPathPoint P2: tibia_l (-0.0358302 -0.0362318 0.0194698) range=(-0.558505 0.174533)
          coordinate=knee_angle_l
      PathPoint P3: tibia_l (-0.0277993 -0.0491224 0.0201493)
    Thelen2003Muscle semiten_l: max_isometric_force=410 optimal_fiber_length=0.2051527 tendon_slack_length=0.2607786
        pennation_angle_at_optimal=0.08726646
      PathPoint P1: pelvis (-0.116662 -0.101455 -0.0557597)
      ConditionalPathPoint P2: tibia_l (-0.0432742 -0.0294364 0.0234441) range=(-0.331613 0.174533)
          coordinate=knee_angle_l
      PathPoint P3: tibia_l (-0.0342034 -0.0543837 0.0235573)
      PathPoint P4: tibia_l (-0.0116345 -0.0768084 0.0252253)
      PathPoint P5: tibia_l (0.00277993 -0.0984301 0.0198714)
    Thelen2003Muscle bifemlh_l: max_isometric_force=896 optimal_fiber_length=0.1108732 tendon_slack_length=0.3316025
        pennation_angle_at_optimal=0
      PathPoint P1: pelvis (-0.116302 -0.0947057 -0.0641158)
      PathPoint P2: tibia_l (-0.0309911 -0.0370657 -0.0303012)
      PathPoint P3: tibia_l (-0.0240927 -0.0579667 -0.0353154)
    Thelen2003Muscle bifemsh_l: max_isometric_force=804 optimal_fiber_length=0.175298 tendon_slack_length=0.09018221
        pennation_angle_at_optimal=0.4014257
      PathPoint P1: femur_l (0.00503805 -0.212707 -0.0235781)
      PathPoint P2: tibia_l (-0.0309911 -0.0370657 -0.0303012)
      PathPoint P3: tibia_l (-0.0240927 -0.0579667 -0.0353154)
    Thelen2003Muscle sar_l: max_isometric_force=156 optimal_fiber_length=0.5198775 tendon_slack_length=0.09997645
        pennation_angle_at_optimal=0
      PathPoint P1: pelvis (-0.0141269 -0.00120033 -0.114677)
      PathPoint P2: femur_l (-0.00302283 -0.359515 0.0424204)
      PathPoint P3: tibia_l (-0.00576578 -0.0431404 0.0410812)
      PathPoint P4: tibia_l (0.00617762 -0.0606437 0.0394338)
      PathPoint P5: tibia_l (0.0250194 -0.0864867 0.025946)
    Thelen2003Muscle add_long_l: max_isometric_force=627 optimal_fiber_length=0.1381323 tendon_slack_length=0.1101054
        pennation_angle_at_optimal=0.1047198
      PathPoint P1: pelvis (-0.0291771 -0.0771901 -0.0156042)
      PathPoint P2: femur_l (0.00503805 -0.212707 -0.0235781)
    Thelen2003Muscle add_brev_l: max_isometric_force=429 optimal_fiber_length=0.1315439 tendon_slack_length=0.01978104
        pennation_angle_at_optimal=0
      PathPoint P1: pelvis (-0.0541993 -0.0844844 -0.0151426)
      PathPoint P2: femur_l (0.000906849 -0.12051 -0.0296237)
    Thelen2003Muscle add_mag1_l: max_isometric_force=381 optimal_fiber_length=0.08683619 tendon_slack_length=0.05988703
        pennation_angle_at_optimal=0.08726646
      PathPoint P1: pelvis (-0.0675875 -0.108399 -0.0235448)
      PathPoint P2: femur_l (-0.00453425 -0.122022 -0.034158)
    Thelen2003Muscle add_mag2_l: max_isometric_force=343 optimal_fiber_length=0.1233986 tendon_slack_length=0.1223788
        pennation_angle_at_optimal=0.05235988
      PathPoint P1: pelvis (-0.0767285 -0.110061 -0.0284385)
      PathPoint P2: femur_l (0.0054411 -0.230239 -0.0228728)
    Thelen2003Muscle add_mag3_l: max_isometric_force=488 optimal_fiber_length=0.1333482 tendon_slack_length=0.2534634
        pennation_angle_at_optimal=0.08726646
      PathPoint P1: pelvis (-0.102563 -0.105379 -0.0450768)
      PathPoint P2: femur_l (0.00705327 -0.38662 0.0268024)
    Thelen2003Muscle tfl_l: max_isometric_force=233 optimal_fiber_length=0.09463503 tendon_slack_length=0.4233673
        pennation_angle_at_optimal=0.05235988
      PathPoint P1: pelvis (-0.0287155 0.0197592 -0.114585)
      PathPoint P2: femur_l (0.0296237 -0.100257 -0.0601543)
      PathPoint P3: femur_l (0.0054411 -0.407982 -0.0359717)
      PathPoint P4: tibia_l (0.00617762 -0.0501417 -0.0305792)
    Thelen2003Muscle pect_l: max_isometric_force=266 optimal_fiber_length=0.09863731 tendon_slack_length=0.03255031
        pennation_angle_at_optimal=0
      PathPoint P1: pelvis (-0.0397954 -0.0709115 -0.0416421)
      PathPoint P2: femur_l (-0.0122928 -0.0828256 -0.0254925)
    Thelen2003Muscle grac_l: max_isometric_force=162 optimal_fiber_length=0.3597669 tendon_slack_length=0.1287802
        pennation_angle_at_optimal=0.05235988
      PathPoint P1: pelvis (-0.0683354 -0.109599 -0.0257978)
      ConditionalPathPoint P2: tibia_l (-0.0273566 -0.0328444 0.0388572) range=(-0.436332 0.174533)
          coordinate=knee_angle_l
      PathPoint P3: tibia_l (-0.0200052 -0.0530555 0.0368598)
      PathPoint P4: tibia_l (0.00617762 -0.0860749 0.023475)
    Thelen2003Muscle glut_max1_l: max_isometric_force=573 optimal_fiber_length=0.1352753 tendon_slack_length=0.1190804
        pennation_angle_at_optimal=0.08726646
      PathPoint P1: pelvis (-0.110338 0.0565076 -0.0646329)
      PathPoint P2: pelvis (-0.119202 0.00110799 -0.0818068)
      PathPoint P3: femur_l (-0.0460478 -0.0249887 -0.0394983)
      PathPoint P4: femur_l (-0.0279108 -0.0570308 -0.0473577)
    Thelen2003Muscle glut_max2_l: max_isometric_force=819 optimal_fiber_length=0.1417263 tendon_slack_length=0.1224438
        pennation_angle_at_optimal=0
      PathPoint P1: pelvis (-0.124557 0.0162506 -0.0519833)
      PathPoint P2: pelvis (-0.12705 -0.048013 -0.0843921)
      PathPoint P3: femur_l (-0.0429242 -0.0534034 -0.029523)
      PathPoint P4: femur_l (-0.0157187 -0.102373 -0.0422189)
    Thelen2003Muscle glut_max3_l: max_isometric_force=552 optimal_fiber_length=0.1389169 tendon_slack_length=0.1398816
        pennation_angle_at_optimal=0.08726646
      PathPoint P1: pelvis (-0.14367 -0.0289925 -0.0053553)
      PathPoint P2: pelvis (-0.141177 -0.097134 -0.0372101)
      PathPoint P3: femur_l (-0.0301276 -0.104892 -0.0136027)
      PathPoint P4: femur_l (-0.00604566 -0.14298 -0.0414128)
    Thelen2003Muscle iliacus_l: max_isometric_force=1073 optimal_fiber_length=0.09486549 tendon_slack_length=0.09486549
        pennation_angle_at_optimal=0.1221731
      PathPoint P1: pelvis (-0.0622322 0.0337014 -0.0788521)
      PathPoint P2: pelvis (-0.0238218 -0.050783 -0.0748818)
      ConditionalPathPoint P3: pelvis (-0.0265918 -0.0743278 -0.0753435) range=(-1.5708 0.785398)
          coordinate=hip_flexion_l
      PathPoint P4: femur_l (0.00171294 -0.0547133 -0.00574338)
      PathPoint P5: femur_l (-0.0194469 -0.0625726 -0.0129982)
    Thelen2003Muscle psoas_l: max_isometric_force=1113 optimal_fiber_length=0.09418681 tendon_slack_length=0.1506989
        pennation_angle_at_optimal=0.1396263
      PathPoint P1: pelvis (-0.0597393 0.0818991 -0.0266842)
      PathPoint P2: pelvis (-0.0219752 -0.0526296 -0.0700805)
      ConditionalPathPoint P3: pelvis (-0.0265918 -0.0743278 -0.0753435) range=(-1.5708 0.785398)
          coordinate=hip_flexion_l
      PathPoint P4: femur_l (0.00161218 -0.0510859 -0.00382892)
      PathPoint P5: femur_l (-0.0189431 -0.0601543 -0.0104791)
    Thelen2003Muscle quad_fem_l: max_isometric_force=381 optimal_fiber_length=0.05170532 tendon_slack_length=0.02298014
        pennation_angle_at_optimal=0
      PathPoint P1: pelvis (-0.105536 -0.106275 -0.048013)
      PathPoint P2: femur_l (-0.03839 -0.0361732 -0.0368785)
    Thelen2003Muscle gem_l: max_isometric_force=164 optimal_fiber_length=0.0231864 tendon_slack_length=0.0376779
        pennation_angle_at_optimal=0
      PathPoint P1: pelvis (-0.104613 -0.0757128 -0.0659256)
      PathPoint P2: femur_l (-0.0143081 -0.00332511 -0.0446371)
    Thelen2003Muscle peri_l: max_isometric_force=444 optimal_fiber_length=0.02447735 tendon_slack_length=0.1082652
        pennation_angle_at_optimal=0.1745329
      PathPoint P1: pelvis (-0.128896 0.000276998 -0.0216982)
      PathPoint P2: pelvis (-0.110153 -0.0254838 -0.0606626)
      PathPoint P3: femur_l (-0.0149126 -0.0036274 -0.0440326)
    Thelen2003Muscle rect_fem_l: max_isometric_force=1169 optimal_fiber_length=0.1139729 tendon_slack_length=0.3099263
        pennation_angle_at_optimal=0.08726646
      PathPoint P1: pelvis (-0.0272381 -0.0287155 -0.0893781)
      ConditionalPathPoint P2: femur_l (0.0336542 -0.406067 -0.00191446) range=(-2.61799 -1.45997)
          coordinate=knee_angle_l
      MovingPathPoint P3: tibia_l (0.0574963 0.0230077 -0.00144145) x_coordinate=knee_angle_l y_coordinate=knee_angle_l
          z_coordinate=knee_angle_l
        x_location: MultiplierFunction: scale=1.029604
          SimmSpline: x=(-2.0944 -1.99997 -1.5708 -1.45752 -1.39626 -1.0472 -0.698132 -0.526391 -0.349066 -0.174533 0 0.00017453 0.00034907 0.0279253 0.0872665 0.174533 2.0944)
              y=(0.0155805 0.0179938 0.0275081 0.0296564 0.0307615 0.0365695 0.0422074 0.0450902 0.048391 0.0534299 0.0617576 0.0617669 0.0617762 0.0633083 0.066994 0.0733035 0.0573481)
        y_location: MultiplierFunction: scale=1.029604
          SimmSpline: x=(-2.0944 -1.99997 -1.5708 -1.45752 -1.39626 -1.0472 -0.698132 -0.526391 -0.349066 -0.174533 0 0.00017453 0.00034907 0.0279253 0.0872665 0.174533 2.0944)
              y=(0.0234116 0.0237613 0.0251141 0.0252795 0.0253146 0.0249184 0.0242373 0.0238447 0.0234197 0.0227644 0.020984 0.0209814 0.0209788 0.0205225 0.0191754 0.0159554 -0.0673774)
        z_location: MultiplierFunction: scale=1.029604
          SimmSpline: x=(-2.0944 0.1745) y=(-0.0014 -0.0014)
    Thelen2003Muscle vas_med_l: max_isometric_force=1294 optimal_fiber_length=0.0895676 tendon_slack_length=0.1268036
        pennation_angle_at_optimal=0.08726646
      PathPoint P1: femur_l (0.0141065 -0.211497 -0.0189431)
      PathPoint P2: femur_l (0.0358709 -0.279007 -0.000906849)
      ConditionalPathPoint P3: femur_l (0.0372816 -0.407881 0.0125951) range=(-2.61799 -1.21004)
          coordinate=knee_angle_l
      ConditionalPathPoint P4: femur_l (0.0276085 -0.428738 0.0131997) range=(-2.61799 -1.78006)
          coordinate=knee_angle_l
      MovingPathPoint P5: tibia_l (0.051469 0.0231259 0.0150322) x_coordinate=knee_angle_l y_coordinate=knee_angle_l
          z_coordinate=knee_angle_l
        x_location: MultiplierFunction: scale=1.029604
          SimmSpline: x=(-2.0944 -1.99997 -1.5708 -1.45752 -1.39626 -1.0472 -0.698132 -0.526391 -0.349066 -0.174533 0 0.00017453 0.00034907 0.0279253 0.0872665 0.174533 2.0944)
              y=(0.00981097 0.0122243 0.0217371 0.0238851 0.0249902 0.0307959 0.0364187 0.0392871 0.0425654 0.0475764 0.0559586 0.0559681 0.0559776 0.0575419 0.0613368 0.0679503 0.0629332)
        y_location: MultiplierFunction: scale=1.029604
          SimmSpline: x=(-2.0944 -1.99997 -1.5708 -1.45752 -1.39626 -1.0472 -0.698132 -0.526391 -0.349066 -0.174533 0 0.00017453 0.00034907 0.0279253 0.0872665 0.174533 2.0944)
              y=(0.0224154 0.0227651 0.0241265 0.0242933 0.0243287 0.0239462 0.0233593 0.0230677 0.0228342 0.0226362 0.0217917 0.0217903 0.0217889 0.0215365 0.0206842 0.0183269 -0.0656205)
        z_location: MultiplierFunction: scale=1.029604
          SimmSpline: x=(-2.0944 2.0944) y=(0.0146 0.0146)
    Thelen2003Muscle vas_int_l: max_isometric_force=1365 optimal_fiber_length=0.08754091 tendon_slack_length=0.1368456
        pennation_angle_at_optimal=0.05235988
      PathPoint P1: femur_l (0.0292207 -0.193864 -0.0312359)
      PathPoint P2: femur_l (0.033755 -0.209986 -0.0287169)
      ConditionalPathPoint P3: femur_l (0.034561 -0.406067 -0.00554186) range=(-2.61799 -1.42) coordinate=knee_angle_l
      MovingPathPoint P4: tibia_l (0.0574963 0.0230077 -0.00144145) x_coordinate=knee_angle_l y_coordinate=knee_angle_l
          z_coordinate=knee_angle_l
        x_location: MultiplierFunction: scale=1.029604
          SimmSpline: x=(-2.0944 -1.99997 -1.5708 -1.45752 -1.39626 -1.0472 -0.698132 -0.526391 -0.349066 -0.174533 0 0.00017453 0.00034907 0.0279253 0.0872665 0.174533 2.0944)
              y=(0.0155805 0.0179938 0.0275081 0.0296564 0.0307615 0.0365695 0.0422074 0.0450902 0.048391 0.0534299 0.0617576 0.0617669 0.0617762 0.0633083 0.066994 0.0733035 0.0573481)
        y_location: MultiplierFunction: scale=1.029604
          SimmSpline: x=(-2.0944 -1.99997 -1.5708 -1.45752 -1.39626 -1.0472 -0.698132 -0.526391 -0.349066 -0.174533 0 0.00017453 0.00034907 0.0279253 0.0872665 0.174533 2.0944)
              y=(0.0234116 0.0237613 0.0251141 0.0252795 0.0253146 0.0249184 0.0242373 0.0238447 0.0234197 0.0227644 0.020984 0.0209814 0.0209788 0.0205225 0.0191754 0.0159554 -0.0673774)
        z_location: MultiplierFunction: scale=1.029604
          SimmSpline: x=(-2.0944 0.1745) y=(-0.0014 -0.0014)
    Thelen2003Muscle vas_lat_l: max_isometric_force=1871 optimal_fiber_length=0.08456884 tendon_slack_length=0.1580632
        pennation_angle_at_optimal=0.08726646
      PathPoint P1: femur_l (0.00483653 -0.186811 -0.0351656)
      PathPoint P2: femur_l (0.0271047 -0.261072 -0.0412113)
      ConditionalPathPoint P3: femur_l (0.0363747 -0.406067 -0.020656) range=(-2.61799 -1.21004)
          coordinate=knee_angle_l
      ConditionalPathPoint P4: femur_l (0.0254925 -0.427529 -0.01854) range=(-2.61799 -1.92004) coordinate=knee_angle_l
      MovingPathPoint P5: tibia_l (0.0558246 0.0213595 -0.0169885) x_coordinate=knee_angle_l y_coordinate=knee_angle_l
          z_coordinate=knee_angle_l
        x_location: MultiplierFunction: scale=1.029604
          SimmSpline: x=(-2.0944 -1.99997 -1.5708 -1.45752 -1.39626 -1.0472 -0.698132 -0.526391 -0.349066 -0.174533 0 0.00017453 0.00034907 0.0279253 0.0872665 0.174533 2.0944)
              y=(0.0142897 0.016703 0.0262145 0.0283623 0.0294674 0.0352709 0.0408785 0.0437291 0.0469704 0.0518742 0.0599557 0.0599647 0.0599738 0.0614577 0.0650351 0.0711867 0.0583766)
        y_location: MultiplierFunction: scale=1.029604
          SimmSpline: x=(-2.0944 -1.99997 -1.5708 -1.45752 -1.39626 -1.0472 -0.698132 -0.526391 -0.349066 -0.174533 0 0.00017453 0.00034907 0.0279253 0.0872665 0.174533 2.0944)
              y=(0.0215318 0.0218815 0.0232362 0.0234019 0.0234371 0.0230439 0.0223842 0.0220151 0.0216359 0.0210971 0.0195864 0.0195842 0.019582 0.01919 0.018008 0.0151073 -0.0653421)
        z_location: MultiplierFunction: scale=1.029604
          SimmSpline: x=(-2.0944 2.0944) y=(-0.0165 -0.0165)
    Thelen2003Muscle med_gas_l: max_isometric_force=1558 optimal_fiber_length=0.06169743 tendon_slack_length=0.4010333
        pennation_angle_at_optimal=0.296706
      PathPoint P1: femur_l (-0.0191446 -0.39589 0.0236788)
      ConditionalPathPoint P2: femur_l (-0.0302283 -0.405261 0.0259964) range=(-0.785398 0.174533)
          coordinate=knee_angle_l
      PathPoint P3: calcn_l (0 0.031 0.0053)
    Thelen2003Muscle lat_gas_l: max_isometric_force=683 optimal_fiber_length=0.0658224 tendon_slack_length=0.3908205
        pennation_angle_at_optimal=0.1396263
      PathPoint P1: femur_l (-0.0221674 -0.397603 -0.027407)
      ConditionalPathPoint P2: femur_l (-0.0302283 -0.404858 -0.0276085) range=(-0.785398 0.174533)
          coordinate=knee_angle_l
      PathPoint P3: calcn_l (0 0.031 0.0053)
    Thelen2003Muscle soleus_l: max_isometric_force=3549 optimal_fiber_length=0.0513866 tendon_slack_length=0.256933
        pennation_angle_at_optimal=0.4363323
      PathPoint P1: tibia_l (-0.00247105 -0.157838 -0.00731019)
      PathPoint P2: calcn_l (0 0.031 0.0053)
    Thelen2003Muscle tib_post_l: max_isometric_force=1588 optimal_fiber_length=0.03179854 tendon_slack_length=0.3179854
        pennation_angle_at_optimal=0.2094395
      PathPoint P1: tibia_l (-0.00967827 -0.138791 -0.00195625)
      PathPoint P2: tibia_l (-0.0148263 -0.417092 0.0235779)
      PathPoint P3: calcn_l (0.0417 0.0334 0.0286)
      PathPoint P4: calcn_l (0.0772 0.0159 0.0281)
    Thelen2003Muscle flex_dig_l: max_isometric_force=310 optimal_fiber_length=0.03453322 tendon_slack_length=0.4062732
        pennation_angle_at_optimal=0.1221731
      PathPoint P1: tibia_l (-0.00854571 -0.210657 0.00185329)
      PathPoint P2: tibia_l (-0.0158559 -0.417092 0.0201802)
      PathPoint P3: calcn_l (0.0436 0.0315 0.028)
      PathPoint P4: calcn_l (0.0708 0.0176 0.0263)
      PathPoint P5: calcn_l (0.1658 -0.0081 -0.0116)
      PathPoint P6: toes_l (-0.0019 -0.0078 -0.0147)
      PathPoint P7: toes_l (0.0285 -0.0071 -0.0215)
      PathPoint P8: toes_l (0.0441 -0.006 -0.0242)
    Thelen2003Muscle flex_hal_l: max_isometric_force=322 optimal_fiber_length=0.04362357 tendon_slack_length=0.3855106
        pennation_angle_at_optimal=0.1745329
      PathPoint P1: tibia_l (-0.00813387 -0.240309 -0.0251223)
      PathPoint P2: tibia_l (-0.0191506 -0.419975 0.0179151)
      PathPoint P3: calcn_l (0.0374 0.0276 0.0241)
      PathPoint P4: calcn_l (0.1038 0.0068 0.0256)
      PathPoint P5: calcn_l (0.1726 -0.0053 0.0269)
      PathPoint P6: toes_l (0.0155 -0.0064 0.0265)
      PathPoint P7: toes_l (0.0562 -0.0102 0.0181)
    Thelen2003Muscle tib_ant_l: max_isometric_force=905 optimal_fiber_length=0.1003639 tendon_slack_length=0.2283792
        pennation_angle_at_optimal=0.08726646
      PathPoint P1: tibia_l (0.0184299 -0.167208 -0.0118404)
      PathPoint P2: tibia_l (0.033874 -0.406796 0.018224)
      PathPoint P3: calcn_l (0.1166 0.0178 0.0305)
    Thelen2003Muscle per_brev_l: max_isometric_force=435 optimal_fiber_length=0.05121917 tendon_slack_length=0.1649257
        pennation_angle_at_optimal=0.08726646
      PathPoint P1: tibia_l (-0.00720723 -0.272433 -0.0334621)
      PathPoint P2: tibia_l (-0.0203862 -0.430786 -0.0291378)
      PathPoint P3: tibia_l (-0.0148263 -0.442215 -0.0297555)
      PathPoint P4: calcn_l (0.0471 0.027 -0.0233)
      PathPoint P5: calcn_l (0.0677 0.0219 -0.0343)
    Thelen2003Muscle per_long_l: max_isometric_force=943 optimal_fiber_length=0.05003866 tendon_slack_length=0.352313
        pennation_angle_at_optimal=0.1745329
      PathPoint P1: tibia_l (0.000514802 -0.161442 -0.0372717)
      PathPoint P2: tibia_l (-0.0213128 -0.432948 -0.0294467)
      PathPoint P3: tibia_l (-0.0166796 -0.444686 -0.0297555)
      PathPoint P4: calcn_l (0.0438 0.023 -0.0221)
      PathPoint P5: calcn_l (0.0681 0.0106 -0.0284)
      PathPoint P6: calcn_l (0.0852 0.0069 -0.0118)
      PathPoint P7: calcn_l (0.1203 0.0085 0.0184)
    Thelen2003Muscle per_tert_l: max_isometric_force=180 optimal_fiber_length=0.0807734 tendon_slack_length=0.1022448
        pennation_angle_at_optimal=0.2268928
      PathPoint P1: tibia_l (0.0010296 -0.288701 -0.0237838)
      PathPoint P2: tibia_l (0.0235779 -0.418946 -0.0163707)
      PathPoint P3: calcn_l (0.0857 0.0228 -0.0299)
    Thelen2003Muscle ext_dig_l: max_isometric_force=512 optimal_fiber_length=0.1039148 tendon_slack_length=0.3514765
        pennation_angle_at_optimal=0.1396263
      PathPoint P1: tibia_l (0.00329473 -0.142188 -0.0284171)
      PathPoint P2: tibia_l (0.0297555 -0.412562 -0.00741315)
      PathPoint P3: calcn_l (0.0922 0.0388 0.0001)
      PathPoint P4: calcn_l (0.1616 0.0055 -0.013)
      PathPoint P5: toes_l (0.0003 0.0047 -0.0153)
      PathPoint P6: toes_l (0.0443 -0.0004 -0.025)
    Thelen2003Muscle ext_hal_l: max_isometric_force=162 optimal_fiber_length=0.1129324 tendon_slack_length=0.3103097
        pennation_angle_at_optimal=0.1047198
      PathPoint P1: tibia_l (0.00123552 -0.181931 -0.023475)
      PathPoint P2: tibia_l (0.0335651 -0.410297 0.00875163)
      PathPoint P3: calcn_l (0.097 0.0389 0.0211)
      PathPoint P4: calcn_l (0.1293 0.0309 0.0257)
      PathPoint P5: calcn_l (0.1734 0.0139 0.028)
      PathPoint P6: toes_l (0.0298 0.0041 0.0245)
      PathPoint P7: toes_l (0.0563 0.0034 0.0186)
    Thelen2003Muscle ercspn_r: max_isometric_force=2500 optimal_fiber_length=0.1281889 tendon_slack_length=0.03204722
        pennation_angle_at_optimal=0
      PathPoint P1: pelvis (-0.129266 0.0405341 0.0402571)
      PathPoint P2: torso (-0.0613329 0.122666 0.026875)
    Thelen2003Muscle ercspn_l: max_isometric_force=2500 optimal_fiber_length=0.1281889 tendon_slack_length=0.03204722
        pennation_angle_at_optimal=0
      PathPoint P1: pelvis (-0.129266 0.0405341 -0.0402571)
      PathPoint P2: torso (-0.0613329 0.122666 -0.026875)
    Thelen2003Muscle intobl_r: max_isometric_force=900 optimal_fiber_length=0.1057628 tendon_slack_length=0.1057628
        pennation_angle_at_optimal=0
      PathPoint P1: pelvis (-0.0369331 0.0646329 0.106829)
      PathPoint P2: torso (0.07806 0.178423 0.0167272)
    Thelen2003Muscle intobl_l: max_isometric_force=900 optimal_fiber_length=0.1057628 tendon_slack_length=0.1057628
        pennation_angle_at_optimal=0
      PathPoint P1: pelvis (-0.0369331 0.0646329 -0.106829)
      PathPoint P2: torso (0.07806 0.178423 -0.0167272)
    Thelen2003Muscle extobl_r: max_isometric_force=900 optimal_fiber_length=0.1229005 tendon_slack_length=0.1433839
        pennation_angle_at_optimal=0
      PathPoint P1: pelvis (-0.0276998 -0.0587236 0.00923327)
      PathPoint P2: torso (0.0724843 0.122666 0.122666)
    Thelen2003Muscle extobl_l: max_isometric_force=900 optimal_fiber_length=0.1229005 tendon_slack_length=0.1433839
        pennation_angle_at_optimal=0
      PathPoint P1: pelvis (-0.0276998 -0.0587236 -0.00923327)
      PathPoint P2: torso (0.0724843 0.122666 -0.122666)
    HuntCrossleyForce Forza_ContactGeom1_l:
      ContactParametersSet contact_parameters:
        ContactParameters: geometry=(Platform ContactGeom1_l) stiffness=400 dissipation=1 static_friction=1
            dynamic_friction=1 viscous_friction=1
    HuntCrossleyForce Forza_ContactGeom2_l:
      ContactParametersSet contact_parameters:
        ContactParameters: geometry=(Platform ContactGeom2_l) stiffness=400 dissipation=1 static_friction=1
            dynamic_friction=1 viscous_friction=1
    HuntCrossleyForce Forza_ContactGeom3_l:
      ContactParametersSet contact_parameters:
        ContactParameters: geometry=(Platform ContactGeom3_l) stiffness=400 dissipation=1 static_friction=1
            dynamic_friction=1 viscous_friction=1
    HuntCrossleyForce Forza_ContactGeom4_l:
      ContactParametersSet contact_parameters:
        ContactParameters: geometry=(Platform ContactGeom4_l) stiffness=400 dissipation=1 static_friction=1
            dynamic_friction=1 viscous_friction=1
  MarkerSet:
    Marker RASI: pelvis (0.0507706 0.0317742 0.122554)
    Marker LASI: pelvis (0.0475675 0.0298059 -0.119799)
    Marker CLAV: torso (0.0684785 0.424756 -0.0100609)
    Marker RSHO: torso (-0.036857 0.460074 0.197104)
    Marker LSHO: torso (-0.0245328 0.440112 -0.23477)
    Marker LKNE: femur_l (0.00396853 -0.428509 -0.0737848)
    Marker LKNEmed: femur_l (-0.00595771 -0.431258 0.0428072)
    Marker LTHI: femur_l (0.0774869 -0.1953 -0.117827)
    Marker LTHI2: femur_l (0.0041433 -0.185911 -0.133807)
    Marker LTHI3: femur_l (0.0347838 -0.236284 -0.120783)
    Marker LANK: tibia_l (-0.0109919 -0.438979 -0.0579763)
    Marker LANKmed: tibia_l (0.0155881 -0.420934 0.0373962)
    Marker LTIB: tibia_l (0.0161115 -0.218207 -0.090608)
    Marker LTIB2: tibia_l (-0.0401666 -0.226983 -0.102085)
    Marker LTIB3: tibia_l (-0.0035512 -0.27003 -0.0928801)
    Marker LTOE: calcn_l (0.204744 0.00748554 0.00723547)
    Marker LHEE: calcn_l (-0.0337806 -0.00229395 0.00245334)
    Marker LLatFoot: calcn_l (0.117391 -0.0358757 -0.0662815)
    Marker RPSI: pelvis (-0.191716 0.0403653 0.0332778)
    Marker LPSI: pelvis (-0.199325 0.0459464 -0.0344243)
    Marker C7: torso (-0.104723 0.609863 0.0218133)
    Marker LFHD: torso (0.0724929 0.750187 -0.0456223)
    Marker RFHD: torso (0.0111473 0.703997 0.0712536)
    Marker LBHD: torso (0.0201366 0.702135 -0.108327)
  ContactGeometrySet:
    ContactHalfSpace Platform: body_name=ground location=(0 0 0) orientation=(0 0 -1.570796)
    ContactSphere ContactGeom1_l: body_name=calcn_l location=(0.03 0.01 0) radius=0.035
    ContactSphere ContactGeom2_l: body_name=calcn_l location=(0.175 -0.015 -0.03) radius=0.015
    ContactSphere ContactGeom3_l: body_name=calcn_l location=(0.175 -0.015 0.04) radius=0.015
    ContactSphere ContactGeom4_l: body_name=calcn_l location=(0.175 -0.015 0.005) radius=0.012
