# OpenSim document version 30000
InverseKinematicsTool KS:
  results_directory: ../IKResults
  model_file: G:\CardiffData\osimData_young\Patient20\model\scaled_model.osim
  accuracy: 1e-5
  marker_file: C:\Users\u0088756\Documents\documenten\software\SoftwareProjects\DC_TrackingSimulation\Data\Patient20\InputData\MarkerFile_DataSel.trc
  time_range: [0 99]
  report_errors: true
  output_motion_file: C:\Users\u0088756\Documents\documenten\software\SoftwareProjects\DC_TrackingSimulation\Data\Patient20\InputData\KS.mot
  IKTaskSet:
    IKMarkerTask RASI: apply=true weight=2
    IKMarkerTask LASI: apply=true weight=2
    IKMarkerTask CLAV: apply=true weight=1
    IKMarkerTask RSHO: apply=true weight=1
    IKMarkerTask LSHO: apply=true weight=1
    IKMarkerTask RKNE: apply=true weight=2
    IKMarkerTask RKNEmed: apply=false weight=0.1
    IKMarkerTask RTHI: apply=true weight=0.5
    IKMarkerTask RTHI2: apply=true weight=0.5
    IKMarkerTask RTHI3: apply=true weight=0.5
    IKMarkerTask RANK: apply=true weight=2
    IKMarkerTask RANKmed: apply=false weight=0.01
    IKMarkerTask RTIB: apply=true weight=0.5
    IKMarkerTask RTIB2: apply=true weight=0.5
    IKMarkerTask RTIB3: apply=true weight=0.01
    IKMarkerTask RTOE: apply=true weight=1
    IKMarkerTask RHEE: apply=true weight=2
    IKMarkerTask RLatFoot: apply=true weight=0.1
    IKMarkerTask LKNE: apply=true weight=2
    IKMarkerTask LKNEmed: apply=false weight=0.01
    IKMarkerTask LTHI: apply=true weight=0.5
    IKMarkerTask LTHI2: apply=false weight=0.5
    IKMarkerTask LTHI3: apply=true weight=0.5
    IKMarkerTask LANK: apply=true weight=2
    IKMarkerTask LANKmed: apply=false weight=0.1
    IKMarkerTask LTIB: apply=true weight=0.5
    IKMarkerTask LTIB2: apply=true weight=0.5
    IKMarkerTask LTIB3: apply=true weight=0.01
    IKMarkerTask LTOE: apply=true weight=1
    IKMarkerTask LHEE: apply=true weight=2
    IKMarkerTask LLatFoot: apply=true weight=0.1
    IKMarkerTask RELB: apply=true weight=1
    IKMarkerTask LELB: apply=true weight=1
    IKMarkerTask RWRA: apply=true weight=0.3
    IKMarkerTask RWRB: apply=true weight=0.3
    IKMarkerTask LWRA: apply=true weight=0.3
    IKMarkerTask LWRB: apply=true weight=0.3
    IKMarkerTask RPSI: apply=true weight=0.5
    IKMarkerTask LPSI: apply=true weight=0.5
    IKMarkerTask SACR: apply=true weight=1
    IKMarkerTask C7: apply=true weight=2
    IKMarkerTask T10: apply=false weight=0.01
    IKMarkerTask RBAK: apply=false weight=0.01
    IKMarkerTask LFHD: apply=false weight=0.01
    IKMarkerTask RFHD: apply=false weight=0.01
    IKMarkerTask LBHD: apply=false weight=0.01
    IKMarkerTask RBHD: apply=false weight=0.01
    IKMarkerTask STRN: apply=false weight=0.5
    IKMarkerTask LFIN: apply=true weight=0.2
    IKMarkerTask RFIN: apply=true weight=0.2
    IKMarkerTask LUA1: apply=true weight=0.2
    IKMarkerTask LUA2: apply=false weight=0.1
    IKMarkerTask LUA3: apply=false weight=0.1
    IKMarkerTask LLA1: apply=true weight=0.2
    IKMarkerTask LLA2: apply=false weight=0.1
    IKMarkerTask LLA3: apply=false weight=0.1
    IKMarkerTask RUA1: apply=true weight=0.2
    IKMarkerTask RUA2: apply=false weight=0.1
    IKMarkerTask RUA3: apply=false weight=0.1
    IKMarkerTask RLA1: apply=true weight=0.2
    IKMarkerTask RLA2: apply=false weight=0.1
    IKMarkerTask RLA3: apply=false weight=0.1
