# OpenSim document version 30000
Model Model_Left_Side:
  length_units: meters
  force_units: N
  gravity: 0 -9.80665 0
  credits:
    Frank Anderson, Peter Loan, Ayman Habib, Ajay Seth, Michael Sherman
  BodySet:
    Body ground: mass=0 mass_center=(0 0 0) inertia_xx=1 inertia_yy=1 inertia_zz=1
    Body first_body_l: mass=0.3392554 mass_center=(0.0731344 0.0219403 0) inertia_xx=0.0002032303
        inertia_yy=0.0005661414 inertia_zz=0.0005951743
      CustomJoint first_body_toGround: parent_body=ground location_in_parent=(0 0 0) location=(0 0 0)
        Coordinate first_body_tilt: motion_type=rotational default_value=0 range=(-1.570796 1.570796) clamped=false
        Coordinate first_body_list: motion_type=rotational default_value=0 range=(-1.570796 1.570796) clamped=false
        Coordinate first_body_rotation: motion_type=rotational default_value=0 range=(-1.570796 1.570796) clamped=false
        Coordinate first_body_tx: motion_type=translational default_value=0 range=(-5 5) clamped=false
        Coordinate first_body_ty: motion_type=translational default_value=0 range=(-1 2) clamped=false
        Coordinate first_body_tz: motion_type=translational default_value=0 range=(-3 3) clamped=false
        SpatialTransform:
          TransformAxis rotation1: coordinates=first_body_list axis=(1 0 0) LinearFunction(coefficients=1 0)
          TransformAxis rotation2: coordinates=first_body_rotation axis=(0 1 0) LinearFunction(coefficients=1 0)
          TransformAxis rotation3: coordinates=first_body_tilt axis=(0 0 1) LinearFunction(coefficients=1 0)
          TransformAxis translation1: coordinates=first_body_tx axis=(1 0 0) LinearFunction(coefficients=1 0)
          TransformAxis translation2: coordinates=first_body_ty axis=(0 1 0) LinearFunction(coefficients=1 0)
          TransformAxis translation3: coordinates=first_body_tz axis=(0 0 1) LinearFunction(coefficients=1 0)
